*Heading
** Job name: ZZ_displacement Model name: Model-1
** Generated by: Abaqus/CAE 6.14-5
*Preprint, echo=NO, model=NO, history=NO, contact=NO
**
** PARTS
**
*Part, name=Part-1
*End Part
**
**
** ASSEMBLY
**
*Assembly, name=Assembly
**
*Instance, name=Part-1-1, part=Part-1
*Node
      1,          -1.,  0.797884583,           1.
      2,           1.,  0.797884583,           1.
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*Element, type=C3D8R
   1, 3418, 3419, 3455, 3454,  334,  335,  371,  370
   2, 3419, 3420, 3456, 3455,  335,  336,  372,  371
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*Nset, nset=Matrix
     1,     2,     3,     4,     5,     6
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*Elset, elset=Matrix, generate
 4721,  9080,     1
*Nset, nset=Fibre
    1,    2,   11,   12,   13,   14
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*Elset, elset=Fibre, generate
    1,  4720,     1
*Orientation, name=Ori-1
1., 0., 0., 0., 1., 0.
1, 0.
** Section: Fibre
*Solid Section, elset=Fibre, orientation=Ori-1, material=Fibre
,
** Section: Matrix
*Solid Section, elset=Matrix, material=Matrix
,
*End Instance
**
*Nset, nset=Set-8, instance=Part-1-1
    2,    7,    8,    9,   10,   64
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*Elset, elset=Set-8, instance=Part-1-1
 4485, 4486, 4487, 4488, 4489, 4490
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*Nset, nset=Set-9, instance=Part-1-1
    1,    3,    4,    5,    6,   11
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*Elset, elset=Set-9, instance=Part-1-1
    1,    2,    3,    4,    5,    6
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*Nset, nset=Set-10, instance=Part-1-1
    3,    4,    5,    6,    7,    8
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*Elset, elset=Set-10, instance=Part-1-1
 4726, 4728, 4730, 4732, 4733, 4734
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*Nset, nset=Set-11, instance=Part-1-1
    1,    2,    3,    4,    5,    6
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*Elset, elset=Set-11, instance=Part-1-1
    1,    2,    3,    4,    5,    6
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*Nset, nset=Set-12, instance=Part-1-1
    1,    2,    3,    4,    5,    6
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*Elset, elset=Set-12, instance=Part-1-1
    1,    2,    3,    4,    5,    6
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*Nset, nset=Set-13, instance=Part-1-1, generate
     1,  10332,      1
*Elset, elset=Set-13, instance=Part-1-1, generate
    1,  9080,     1
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*Nset, nset=Set-28, instance=Part-1-1
    1,    2,    3,    4,    5,    6
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*Nset, nset=zzminus, instance=Part-1-1
    5,    6,    9,   10,  153,  154
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*Elset, elset=zzminus, instance=Part-1-1
 4841, 4843, 4845, 4847, 4848, 4849
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*Nset, nset=zzplus, instance=Part-1-1
    3,    4,    7,    8,  117,  118
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*Elset, elset=zzplus, instance=Part-1-1
 4734, 4736, 4737, 4738, 4739, 4740
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*End Assembly
**
** MATERIALS
**
** E-glass 21xK43 Gevetex
*Material, name=Fibre
*Conductivity, type=ORTHO
 4.9e-06, 4.9e-06, 4.9e-06
*Elastic, type=ENGINEERING CONSTANTS
80000.,80000.,80000.,   0.2,   0.2,   0.2,33330.,33330.
33330.,
** MY750/HY917/DY063 epoxy
*Material, name=Matrix
*Conductivity
 5.8e-05,
*Elastic
3350., 0.35
** ----------------------------------------------------------------
**
** STEP: Loading_step
**
*Step, name=Loading_step, nlgeom=NO
*Static
1., 1., 1e-05, 1.
**
** BOUNDARY CONDITIONS
**
** Name: BC-1 Type: Displacement/Rotation
*Boundary
zzminus, 1, 1
zzminus, 2, 2
zzminus, 3, 3, -0.01
** Name: BC-2 Type: Displacement/Rotation
*Boundary
zzplus, 1, 1
zzplus, 2, 2
zzplus, 3, 3, 0.01
** Name: BC-3 Type: Displacement/Rotation
*Boundary
Set-28, 1, 1
Set-28, 2, 2
**
** OUTPUT REQUESTS
**
*Restart, write, frequency=0
**
** FIELD OUTPUT: F-Output-1
**
*Output, field
*Element Output, directions=YES
E, EVOL, S
**
** HISTORY OUTPUT: H-Output-1
**
*Output, history, variable=PRESELECT
*End Step
